// COMSOL Multiphysics 4.4.0.129 model "spiral_inductor.mph"
// modeldescr_acdc/spiral_inductor
// Outline of the model tree

Geometry
  geom1 "Geometry 1" (3D, length unit m)
    imp1: Import | filename = spiral_inductor.mphbin
    fin: Finalize "Form Union"

Materials
  mat1 "Conductor" on domains 2
    def "Basic"
      electricconductivity = 1e6
      relpermittivity = 1
      relpermeability = 1
  mat2 "Air" on domains 1
    def "Basic"
      electricconductivity = 1
      relpermittivity = 1
      relpermeability = 1

Physics
  mef: ElectricInductionCurrents "Magnetic and Electric Fields" on all domains
    dependent variable A = {Ax, Ay, Az}
    alc1: ElectromagneticModel "Ampère's Law and Current Conservation 1" (default)
    mi1: MagneticInsulation (default)
      ein1: ElectricInsulation (default)
      term1: Terminal on boundaries 5 | I0 = 1
      gnd1: Ground on boundaries 75, 76
    init1: init "Initial Values 1" (default)

Mesh
  mesh1 "Mesh 1" (physics-controlled)
    size: MeshSizeDefault | hauto = 7

Studies
  std1 "Study 1"
    stat: Stationary

Solver configurations
  sol1 "Solver 1" (study std1)
    v1: Variables "Dependent Variables 1"
    s1: Stationary "Stationary Solver 1"
      fc1: FullyCoupled | linsolver = i1
      i1: Iterative | linsolver = fgmres; rhob = 1e4
        mg1: Multigrid

Datasets
  dset1: Solution on boundaries 5-9, 11-74, 76 | solution = sol1

Derived values
  gev1: EvalGlobal "Global Evaluation 1" | data = dset1; table = tbl1; expr = mef.L11

Tables
  tbl1: Table
    // Global Evaluation 1 (mef.L11)
    Inductance (H)
    7.51713e-10

Plots
  pg1: PlotGroup3D "Magnetic Flux Density Norm (mef)" | data = dset1
    mslc1: Multislice | expr = mef.normB
  pg2: PlotGroup3D "3D Plot Group 2" | data = dset1
    surf1: Surface | expr = V
    str1: Streamline | expr = {mef.Bx, mef.By, mef.Bz}; linetype = tube; radiusexpr = 1e-6
      col1: Color "Color Expression 1" | expr = mef.normB