// COMSOL Multiphysics 4.4.0.248 model "microrobot-3coils(1).mph"
// Outline of the model tree
// Components: comp1 "Coils", comp2 "microbot-in-Box"

Parameters
  I0 = 0.25[mA]  // Coil current

Geometry
  geom1 "Geometry 1" [comp1] (3D, length unit mm)
    cad1: LiveLinkCAD "LiveLink for SolidWorks 1"
    fin: Finalize "Form Union"
  geom2 "Geometry 2" [comp2] (3D, length unit mm)
    cad1: LiveLinkCAD "LiveLink for SolidWorks 1"
    fin: Finalize "Form Union"

Materials
  mat1 "Air" [comp1] on domains 1-4, 6-8
    def "Basic"
      relpermeability = 1
      relpermittivity = 1
      dynamicviscosity = eta(T[1/K])[Pa*s]
      ratioofspecificheat = 1.4
      electricconductivity = 0[S/m]
      heatcapacity = Cp(T[1/K])[J/(kg*K)]
      density = rho(pA[1/Pa],T[1/K])[kg/m^3]
      thermalconductivity = k(T[1/K])[W/(m*K)]
      soundspeed = cs(T[1/K])[m/s]
      eta: Piecewise | arg = T; extrap = constant; pieces = {200.0, 1600.0, -8.38278E-7+8.35717342E-8*T^1-7.69429583E-11*T^2+4.6437266E-14*T^3-1.06585607E-17*T^4}
      Cp: Piecewise | arg = T; extrap = constant; pieces = {200.0, 1600.0, 1047.63657-0.372589265*T^1+9.45304214E-4*T^2-6.02409443E-7*T^3+1.2858961E-10*T^4}
      rho: Analytic | expr = pA*0.02897/8.314/T; args = {pA, T}; dermethod = manual; argders = {{pA, d(pA*0.02897/8.314/T,pA)}, {T, d(pA*0.02897/8.314/T,T)}}
      k: Piecewise | arg = T; extrap = constant; pieces = {200.0, 1600.0, -0.00227583562+1.15480022E-4*T^1-7.90252856E-8*T^2+4.11702505E-11*T^3-7.43864331E-15*T^4}
      cs: Analytic | expr = sqrt(1.4*287*T); args = T; dermethod = manual; argders = {T, d(sqrt(1.4*287*T),T)}
    RefractiveIndex
      n = 1
      ki = 0
  mat2 "Material 2" [comp1] on domains 5
    def "Basic"
      dynamicviscosity = 7
      electricconductivity = 1
      relpermittivity = 1
      relpermeability = 1

Physics
  mf: InductionCurrents "Magnetic Fields" [geom1] on domains 1-3, 5-8
    dependent variable A = {Ax, Ay, Az}
    al1: AmperesLaw "Ampère's Law 1" (default)
    mi1: MagneticInsulation (default)
    init1: init "Initial Values 1" (default)
    mtcd1: MultiTurnCoilDomain "Multi-Turn Coil 1" on domains 8 | CoilType = Circular; ICoil = I0
      cre1: CoilReferenceEdge "Reference Edge 1" on edges 87, 88
    mtcd2: MultiTurnCoilDomain "Multi-Turn Coil 2" on domains 1 | CoilType = Circular; ICoil = I0
      cre1: CoilReferenceEdge "Reference Edge 1" on edges 1, 2
    mtcd3: MultiTurnCoilDomain "Multi-Turn Coil 3" on domains 7 | CoilType = Circular; ICoil = I0
      cre1: CoilReferenceEdge "Reference Edge 1" on edges 67, 68
    mtcd4: MultiTurnCoilDomain "Multi-Turn Coil 4" on domains 6 | CoilType = Circular; ICoil = I0
      cre1: CoilReferenceEdge "Reference Edge 1" on edges 55, 56
    mtcd5: MultiTurnCoilDomain "Multi-Turn Coil 5" on domains 3 | CoilType = Circular; ICoil = I0
      cre1: CoilReferenceEdge "Reference Edge 1" on edges 17, 18
    mtcd6: MultiTurnCoilDomain "Multi-Turn Coil 6" on domains 2 | CoilType = Circular; ICoil = I0
      cre1: CoilReferenceEdge "Reference Edge 1" on edges 12, 13
  spf: CreepingFlow [geom2] on domains 1-3, 5-8
    dependent variable u = {u, v, w}
    fp1: FluidProperties (default)
    wall1: Wall (default)
    init1: init "Initial Values 1" (default)

Mesh
  mesh1 "Mesh 1" [geom1]
    size: MeshSizeDefault | hauto = 6; custom = off
    ftet2: FreeTet "Free Tetrahedral 2" on remaining entities
      size1: Size on domains 1, 8 | hmax = 0.05; hmin = 0.0001; hauto = 5; custom = on
  mesh2 "Mesh 2" [geom2] (physics-controlled)
    size: MeshSizeDefault | hauto = 5

Studies
  std1 "Study 1"
    stat: Stationary