// COMSOL Multiphysics 4.4.0.248 model "busbar_box_I.mph"
// Outline of the model tree

Parameters
  L = 9[cm]
  rad_1 = 6[mm]
  tbb = 5[mm]
  wbb = 5[cm]
  mh = 6[mm]
  htc = 5[W/m^2/K]
  Vtot = 20[mV]
  Vin = 1e-1[m/s]

Selections
  sel1: Explicit "Ti bolts" on domains 3-8

Geometry
  geom1 "Geometry 1" (3D, length unit m)
    wp1: WorkPlane | quickplane = xz; unite = on
      r1: Rectangle | size = {L+2*tbb, 0.1}
      r2: Rectangle | pos = {0, tbb}; size = {L+tbb, 0.1-tbb}
      dif1: Difference | input = r1; input2 = r2
      fil1: Fillet | point = dif1(1) entities 3; radius = tbb
      fil2: Fillet | point = fil1(1) entities 6; radius = 2*tbb
    ext1: Extrude | workplane = wp1; input = wp1; distance = wbb
    wp2: WorkPlane | planetype = faceparallel; face = ext1(1) boundaries 8; unite = on
      c1: Circle | r = rad_1
    ext2: Extrude | workplane = wp2; input = wp2; distance = -2*tbb
    wp3: WorkPlane | planetype = faceparallel; face = ext1(1) boundaries 4; unite = on
      c1: Circle | pos = {-L/2+1.5e-2, -wbb/4}; r = rad_1
      copy1: Copy | input = c1; disply = wbb/2
    ext3: Extrude | workplane = wp3; input = wp3; distance = -2*tbb
    blk1: Block | pos = {-2*tbb, -L, -tbb}; size = {L+5*tbb, 3*L, L+6*tbb}
    fin: Finalize "Form Union"

Materials
  mat1 "Copper" on all domains
    def "Basic"
      relpermeability = 1
      electricconductivity = 5.998e7[S/m]
      thermalexpansioncoefficient = 17e-6[1/K]
      heatcapacity = 385[J/(kg*K)]
      relpermittivity = 1
      density = 8700[kg/m^3]
      thermalconductivity = 400[W/(m*K)]
    Enu "Young's modulus and Poisson's ratio"
      youngsmodulus = 110e9[Pa]
      poissonsratio = 0.35
    linzRes "Linearized resistivity"
      rho0 = 1.72e-8[ohm*m]
      alpha = 0.0039[1/K]
      Tref = 298[K]
  mat2 "Titanium beta-21S" on selection sel1
    def "Basic"
      relpermeability = 1
      electricconductivity = 7.407e5[S/m]
      thermalexpansioncoefficient = 7.06e-6[1/K]
      heatcapacity = 710[J/(kg*K)]
      relpermittivity = 1
      density = 4940[kg/m^3]
      thermalconductivity = 7.5[W/(m*K)]
    Enu "Young's modulus and Poisson's ratio"
      youngsmodulus = 105e9[Pa]
      poissonsratio = 0.33
  mat3 "Air" on domains 1
    def "Basic"
      relpermeability = 1
      relpermittivity = 1
      dynamicviscosity = eta(T[1/K])[Pa*s]
      ratioofspecificheat = 1.4
      electricconductivity = 0[S/m]
      heatcapacity = Cp(T[1/K])[J/(kg*K)]
      density = rho(pA[1/Pa],T[1/K])[kg/m^3]
      thermalconductivity = k(T[1/K])[W/(m*K)]
      soundspeed = cs(T[1/K])[m/s]
      eta: Piecewise | arg = T; extrap = constant; pieces = {200.0, 1600.0, -8.38278E-7+8.35717342E-8*T^1-7.69429583E-11*T^2+4.6437266E-14*T^3-1.06585607E-17*T^4}
      Cp: Piecewise | arg = T; extrap = constant; pieces = {200.0, 1600.0, 1047.63657-0.372589265*T^1+9.45304214E-4*T^2-6.02409443E-7*T^3+1.2858961E-10*T^4}
      rho: Analytic | expr = pA*0.02897/8.314/T; args = {pA, T}; dermethod = manual; argders = {{pA, d(pA*0.02897/8.314/T,pA)}, {T, d(pA*0.02897/8.314/T,T)}}
      k: Piecewise | arg = T; extrap = constant; pieces = {200.0, 1600.0, -0.00227583562+1.15480022E-4*T^1-7.90252856E-8*T^2+4.11702505E-11*T^3-7.43864331E-15*T^4}
      cs: Analytic | expr = sqrt(1.4*287*T); args = T; dermethod = manual; argders = {T, d(sqrt(1.4*287*T),T)}
    RefractiveIndex
      n = 1
      ki = 0

Physics
  ec: ConductiveMedia "Electric Currents" on domains 2-8
    dependent variable V
    cucn1: CurrentConservation (default)
    ein1: ElectricInsulation (default)
    init1: init "Initial Values 1" (default)
    pot1: ElectricPotential on boundaries 49 | V0 = Vtot
    gnd1: Ground on boundaries 13, 20
  ht: HeatTransfer "Heat Transfer in Solids" on all domains
    dependent variable T
    solid1: SolidHeatTransferModel "Heat Transfer in Solids 1" (default)
    ins1: ThermalInsulation (default)
    init1: init "Initial Values 1" (default)
    hf1: HeatFluxBoundary "Heat Flux 1" on boundaries 6-8, 10-12, 14-16, 18, 19, 21-23, 25-34, 36, 38-47
      HeatFluxType = InwardHeatFlux
      h = htc
    fluid1: FluidHeatTransferModel "Heat Transfer in Fluids 1" on domains 1
      minput_pressure_src = root.comp1.p
      minput_velocity_src = root.comp1.u
    temp1: TemperatureBoundary "Temperature 1" on boundaries 2
    ofl1: ConvectiveOutflow "Outflow 1" on boundaries 5
  spf: LaminarFlow on domains 1
    dependent variable u = {u, v, w}
    fp1: FluidProperties (default)
    wall1: Wall (default)
    init1: init "Initial Values 1" (default)

Multiphysics
  emh1: ElectromagneticHeatSource on all domains | EMHeat_physics = ec; Heat_physics = ht
  bemh1: BoundaryElectromagneticHeatSource on all boundaries | EMHeatBoundary_physics = ec; Heat_physics = ht
  tc1: TemperatureCoupling | TemperatureSource_physics = ht; TemperatureDestination_physics = ec

Mesh
  mesh1 "Mesh 1"
    size: MeshSizeDefault | hmax = mh; hmin = mh-mh/3; hcurve = 0.2; hauto = 5; custom = on
    ftet1: FreeTet "Free Tetrahedral 1" on remaining entities

Studies
  std1 "Study 1"
    stat: Stationary

Solver configurations
  sol1 "Solver 1" (study std1)
    v1: Variables "Dependent Variables 1"
    s1: Stationary "Stationary Solver 1"
      se1: Segregated
        ss1: SegregatedStep | segvar = {comp1_V}; linsolver = i1
        ss2: SegregatedStep | segvar = {comp1_T}; linsolver = d1; subdamp = 1; subjtech = minimal
        spf1: SegregatedStep "Segregated Step 1a"
      i1: Iterative | linsolver = cg
        mg1: Multigrid | prefun = amg
      d1: Direct | linsolver = pardiso

Datasets
  dset1: Solution | solution = sol1

Plots
  pg1: PlotGroup3D "Electric Potential (ec)" | data = dset1
    mslc1: Multislice | expr = V
  pg2: PlotGroup3D "Temperature (ht)" | data = dset1
    surf1: Surface | expr = T
  pg3: PlotGroup3D "Isothermal Contours (ht)" | data = dset1
    iso1: Isosurface | expr = T
    arwv1: ArrowVolume | expr = {ht.tfluxx, ht.tfluxy, ht.tfluxz}; arrowlength = logarithmic
  pg4: PlotGroup3D "3D Plot Group 4" | data = dset1
    surf1: Surface | expr = ec.normJ