// COMSOL Multiphysics 4.4.0.248 model "helmholtz_coil.mph"
// modeldescr_acdc/helmholtz_coil
// Outline of the model tree

Parameters
  I0 = 0.25[mA]  // Coil current

Selections
  sel1: Explicit "Coils" on boundaries adjacent to domains 2, 3

Geometry
  geom1 "Geometry 1" (3D, length unit m)
    wp1: WorkPlane | unite = on
      sq1: Square | pos = {-0.4, 0.2}; base = center; size = 0.05
      sq2: Square | pos = {-0.4, -0.2}; base = center; size = 0.05
    rev1: Revolve | workplane = wp1; input = wp1
    sph1: Sphere | r = 1
    fin: Finalize "Form Union"

Materials
  mat1 "Air" on all domains
    def "Basic"
      relpermeability = 1
      relpermittivity = 1
      dynamicviscosity = eta(T[1/K])[Pa*s]
      ratioofspecificheat = 1.4
      electricconductivity = 0[S/m]
      heatcapacity = Cp(T[1/K])[J/(kg*K)]
      density = rho(pA[1/Pa],T[1/K])[kg/m^3]
      thermalconductivity = k(T[1/K])[W/(m*K)]
      soundspeed = cs(T[1/K])[m/s]
      eta: Piecewise | arg = T; extrap = constant; pieces = {200.0, 1600.0, -8.38278E-7+8.35717342E-8*T^1-7.69429583E-11*T^2+4.6437266E-14*T^3-1.06585607E-17*T^4}
      Cp: Piecewise | arg = T; extrap = constant; pieces = {200.0, 1600.0, 1047.63657-0.372589265*T^1+9.45304214E-4*T^2-6.02409443E-7*T^3+1.2858961E-10*T^4}
      rho: Analytic | expr = pA*0.02897/8.314/T; args = {pA, T}; dermethod = manual; argders = {{pA, d(pA*0.02897/8.314/T,pA)}, {T, d(pA*0.02897/8.314/T,T)}}
      k: Piecewise | arg = T; extrap = constant; pieces = {200.0, 1600.0, -0.00227583562+1.15480022E-4*T^1-7.90252856E-8*T^2+4.11702505E-11*T^3-7.43864331E-15*T^4}
      cs: Analytic | expr = sqrt(1.4*287*T); args = T; dermethod = manual; argders = {T, d(sqrt(1.4*287*T),T)}
    RefractiveIndex
      n = 1
      ki = 0

Physics
  mf: InductionCurrents "Magnetic Fields" on all domains
    dependent variable A = {Ax, Ay, Az}
    al1: AmperesLaw "Ampère's Law 1" (default)
    mi1: MagneticInsulation (default)
    init1: init "Initial Values 1" (default)
    mtcd1: MultiTurnCoilDomain "Multi-Turn Coil 1" on domains 2 | CoilType = Circular; ICoil = I0
      cre1: CoilReferenceEdge "Reference Edge 1" on edges 20, 21, 36, 39
    mtcd2: MultiTurnCoilDomain "Multi-Turn Coil 2" on domains 3 | CoilType = Circular; ICoil = I0
      cre1: CoilReferenceEdge "Reference Edge 1" on edges 25, 26, 56, 59

Mesh
  mesh1 "Mesh 1"
    size: MeshSizeDefault | hmax = 0.3; hmin = 0.056; hcurve = 0.7; hnarrow = 0.4; hgrad = 1.6; hauto = 6
    ftet1: FreeTet "Free Tetrahedral 1" on remaining entities
      size1: Size on domains 2, 3 | hmax = 0.05; hauto = 5; custom = on

Studies
  std1 "Study 1"
    stat: Stationary

Solver configurations
  sol1 "Solver 1" (study std1)
    v1: Variables "Dependent Variables 1"
    s1: Stationary "Stationary Solver 1"
      fc1: FullyCoupled | linsolver = i1
      i1: Iterative | linsolver = fgmres
        mg1: Multigrid

Datasets
  dset1: Solution | solution = sol1

Plots
  pg1: PlotGroup3D "3D Plot Group 1" | data = dset1
    slc1: Slice | expr = mf.normB; quickplane = xy; quickznumber = 1; genpoints = {{0, 0, 0}, {1, 0, 0}, {0, 1, 0}}
    arwv1: ArrowVolume | expr = {mf.Hx, mf.Hy, mf.Hz}; xnumber = 24; ynumber = 10; znumber = 1
    surf1: Surface | expr = 1
  pg2: PlotGroup3D "3D Plot Group 2" | data = dset1
    str1: Streamline on boundaries 5 | data = dset1; expr = {mf.mtcd1.eCoilx, mf.mtcd1.eCoily, mf.mtcd1.eCoilz}
    str2: Streamline on boundaries 12 | expr = {mf.mtcd2.eCoilx, mf.mtcd2.eCoily, mf.mtcd2.eCoilz}